# OpenSim document version 40500
InverseKinematicsTool:
  time_range: 0 3.966667
  marker_file: smpl_motion_jump.trc
  IKTaskSet:
    IKMarkerTask r_hip: apply=false weight=1
    IKMarkerTask l_hip: apply=false weight=1
    IKMarkerTask r_ankle: apply=false weight=1
    IKMarkerTask l_ankle: apply=false weight=1
    IKMarkerTask r_mtp: apply=false weight=1
    IKMarkerTask l_mtp: apply=false weight=1
    IKMarkerTask r_knee: apply=false weight=1
    IKMarkerTask l_knee: apply=false weight=1
    IKMarkerTask r_shoulder: apply=false weight=1
    IKMarkerTask l_shoulder: apply=false weight=1
    IKMarkerTask r_elbow_ulna: apply=false weight=1
    IKMarkerTask l_elbow_ulna: apply=false weight=1
    IKMarkerTask r_hand: apply=false weight=1
    IKMarkerTask l_hand: apply=false weight=1
    IKMarkerTask pelvis: apply=false weight=1
    IKMarkerTask spine: apply=false weight=1
    IKMarkerTask r_elbow_radius: apply=false weight=1
    IKMarkerTask l_elbow_radius: apply=false weight=1
    IKMarkerTask r_subtalar: apply=false weight=1
    IKMarkerTask l_subtalar: apply=false weight=1
    IKMarkerTask r_smpl_hip: apply=true weight=1
    IKMarkerTask l_smpl_hip: apply=true weight=1
    IKMarkerTask r_smpl_ankle: apply=true weight=1
    IKMarkerTask l_smpl_ankle: apply=true weight=1
    IKMarkerTask r_smpl_mtp: apply=true weight=1
    IKMarkerTask l_smpl_mtp: apply=true weight=1
    IKMarkerTask r_smpl_knee: apply=true weight=1
    IKMarkerTask l_smpl_knee: apply=true weight=1
    IKMarkerTask r_smpl_shoulder: apply=true weight=1
    IKMarkerTask l_smpl_shoulder: apply=true weight=1
    IKMarkerTask r_smpl_elbow: apply=true weight=1
    IKMarkerTask l_smpl_elbow: apply=true weight=1
    IKMarkerTask r_smpl_hand: apply=true weight=1
    IKMarkerTask l_smpl_hand: apply=true weight=1
    IKMarkerTask smpl_pelvis: apply=true weight=1
    IKMarkerTask smpl_spine: apply=true weight=1
    IKMarkerTask smpl_head: apply=false weight=1
    IKMarkerTask shoulders_middle: apply=false weight=1
