# OpenSim document version 40500
MarkerSet:
  Marker r_hip: femur_r (0 0 0) fixed=true
  Marker l_hip: femur_l (0 0 0) fixed=true
  Marker r_ankle: talus_r (0 0 0) fixed=true
  Marker l_ankle: talus_l (0 0 0) fixed=true
  Marker r_mtp: toes_r (0 0 0) fixed=true
  Marker l_mtp: toes_l (0 0 0) fixed=true
  Marker r_knee: femur_r (-0.0045 -0.4096 -0.00175) fixed=true
  Marker l_knee: femur_l (-0.0045 -0.4096 0.00175) fixed=true
  Marker r_shoulder: humerus_r (0 0 0) fixed=true
  Marker l_shoulder: humerus_l (0 0 0) fixed=true
  Marker r_elbow_ulna: ulna_r (0 0 0) fixed=true
  Marker l_elbow_ulna: ulna_l (0 0 0) fixed=true
  Marker r_hand: hand_r (0 0 0) fixed=true
  Marker l_hand: hand_l (0 0 0) fixed=true
  Marker pelvis: pelvis (0 0 0) fixed=true
  Marker spine: torso (0 0 0) fixed=true
  Marker r_elbow_radius: radius_r (0 0 0) fixed=true
  Marker l_elbow_radius: radius_l (0 0 0) fixed=true
  Marker r_subtalar: calcn_r (0 0 0) fixed=true
  Marker l_subtalar: calcn_l (0 0 0) fixed=true
  Marker r_smpl_hip: femur_r (0 0 0)
  Marker l_smpl_hip: femur_l (0 0 0)
  Marker r_smpl_ankle: talus_r (0 0 0)
  Marker l_smpl_ankle: talus_l (0 0 0)
  Marker r_smpl_mtp: toes_r (0 0 0)
  Marker l_smpl_mtp: toes_l (0 0 0)
  Marker r_smpl_knee: femur_r (-0.0045 -0.4096 -0.00175)
  Marker l_smpl_knee: femur_l (-0.0045 -0.4096 0.00175)
  Marker r_smpl_shoulder: humerus_r (0 0 0)
  Marker l_smpl_shoulder: humerus_l (0 0 0)
  Marker r_smpl_elbow: ulna_r (0 0 0)
  Marker l_smpl_elbow: ulna_l (0 0 0)
  Marker r_smpl_hand: hand_r (0 0 0)
  Marker l_smpl_hand: hand_l (0 0 0)
  Marker smpl_pelvis: pelvis (0 0 0)
  Marker smpl_spine: torso (0 0 0)
  Marker smpl_head: torso (0 0.5 0)
