# OpenSim document version 40500
MarkerSet:
  Marker r_hip: ground (-0.056276 0.85151 0.07726) fixed=true
  Marker l_hip: ground (-0.056276 0.85151 -0.07726) fixed=true
  Marker r_ankle: ground (-0.06279568 0.04541976 0.07699432) fixed=true
  Marker l_ankle: ground (-0.06279568 0.04541976 -0.07699432) fixed=true
  Marker r_mtp: ground (0.06722397 0.001437107 0.08598428) fixed=true
  Marker l_mtp: ground (0.06722397 0.001437107 -0.08598428) fixed=true
  Marker r_knee: ground (-0.060776 0.44191 0.07551001) fixed=true
  Marker l_knee: ground (-0.060776 0.44191 -0.07551001) fixed=true
  Marker r_shoulder: ground (-0.1096727 1.384478 0.1665199) fixed=true
  Marker l_shoulder: ground (-0.1063853 1.381372 -0.17345) fixed=true
  Marker r_elbow: ground (-0.08836404 1.098616 0.1597424) fixed=true
  Marker l_elbow: ground (-0.08526216 1.095685 -0.1610392) fixed=true
  Marker r_hand: ground (-0.09718 0.8497973 0.2016127) fixed=true
  Marker l_hand: ground (-0.09331084 0.8461408 -0.1985184) fixed=true
  Marker pelvis: ground (0 0.93 0)
  Marker spine: ground (-0.1007 1.0115 0)
