# OpenSim document version 40500
ScaleTool LaiUhlrich2022-scaled:
  mass: 75 [kg]
  height: -1
  age: -1
  ModelScaler:
    apply: true
    scaling_order: measurements
    marker_file: /Users/auberger/Documents/Github_repos/phys-dno/Aurel/skeleton_fitting/setup/../output/joints_male.trc
    time_range: 0 0.15
    preserve_mass_distribution: true
    MeasurementSet:
      Measurement femur: apply=true
        MarkerPair: markers=(r_hip r_knee)
        MarkerPair: markers=(l_hip l_knee)
        BodyScale femur_r: axes=(X Y Z)
        BodyScale patella_r: axes=(X Y Z)
        BodyScale femur_l: axes=(X Y Z)
        BodyScale patella_l: axes=(X Y Z)
      Measurement tibia: apply=true
        MarkerPair: markers=(r_knee r_ankle)
        MarkerPair: markers=(l_knee l_ankle)
        BodyScale tibia_r: axes=(X Y Z)
        BodyScale talus_r: axes=(X Y Z)
        BodyScale tibia_l: axes=(X Y Z)
        BodyScale talus_l: axes=(X Y Z)
      Measurement foot: apply=true
        MarkerPair: markers=(r_subtalar r_mtp)
        MarkerPair: markers=(l_subtalar l_mtp)
        BodyScale calcn_r: axes=(X Y Z)
        BodyScale toes_r: axes=(X Y Z)
        BodyScale calcn_l: axes=(X Y Z)
        BodyScale toes_l: axes=(X Y Z)
      Measurement pelvis_z: apply=true
        MarkerPair: markers=(r_hip l_hip)
        BodyScale pelvis: axes=Z
      Measurement pelvis_x: apply=true
        MarkerPair: markers=(r_hip pelvis)
        MarkerPair: markers=(l_hip pelvis)
        BodyScale pelvis: axes=X
      Measurement pelvis_y: apply=true
        MarkerPair: markers=(r_hip pelvis)
        MarkerPair: markers=(l_hip pelvis)
        MarkerPair: markers=(r_hip l_hip)
        BodyScale pelvis: axes=Y
      Measurement torso_y: apply=true
        MarkerPair: markers=(r_shoulder pelvis)
        MarkerPair: markers=(l_shoulder pelvis)
        MarkerPair: markers=(r_hip r_shoulder)
        MarkerPair: markers=(l_hip l_shoulder)
        BodyScale torso: axes=Y
      Measurement torso_z: apply=true
        MarkerPair: markers=(r_shoulder l_shoulder)
        BodyScale torso: axes=Z
      Measurement torso_x: apply=true
        MarkerPair: markers=(r_shoulder l_shoulder)
        MarkerPair: markers=(r_shoulder pelvis)
        MarkerPair: markers=(l_shoulder pelvis)
        BodyScale torso: axes=X
      Measurement humerus: apply=true
        MarkerPair: markers=(r_shoulder r_elbow_ulna)
        MarkerPair: markers=(l_shoulder l_elbow_ulna)
        BodyScale humerus_r: axes=(X Y Z)
      Measurement forarm: apply=true
        MarkerPair: markers=(r_elbow_radius r_hand)
        MarkerPair: markers=(l_elbow_radius l_hand)
        BodyScale ulna_r: axes=(X Y Z)
        BodyScale radius_r: axes=(X Y Z)
        BodyScale hand_r: axes=(X Y Z)
        BodyScale humerus_l: axes=(X Y Z)
        BodyScale ulna_l: axes=(X Y Z)
        BodyScale radius_l: axes=(X Y Z)
        BodyScale hand_l: axes=(X Y Z)
  MarkerPlacer:
    apply: true
    marker_file: ../output/smpl_motion_jump.trc
    time_range: 0 0.15
    max_marker_movement: -1
    IKTaskSet:
      IKMarkerTask r_hip: apply=false weight=2
      IKMarkerTask l_hip: apply=false weight=2
      IKMarkerTask r_ankle: apply=false weight=2
      IKMarkerTask l_ankle: apply=false weight=2
      IKMarkerTask r_mtp: apply=false weight=2
      IKMarkerTask l_mtp: apply=false weight=2
      IKMarkerTask r_knee: apply=false weight=2
      IKMarkerTask l_knee: apply=false weight=2
      IKMarkerTask r_shoulder: apply=false weight=2
      IKMarkerTask l_shoulder: apply=false weight=2
      IKMarkerTask r_elbow_ulna: apply=false weight=2
      IKMarkerTask l_elbow_ulna: apply=false weight=2
      IKMarkerTask r_hand: apply=false weight=2
      IKMarkerTask l_hand: apply=false weight=2
      IKMarkerTask pelvis: apply=false weight=2
      IKMarkerTask spine: apply=false weight=2
      IKMarkerTask r_elbow_radius: apply=false weight=2
      IKMarkerTask l_elbow_radius: apply=false weight=2
      IKMarkerTask r_subtalar: apply=false weight=2
      IKMarkerTask l_subtalar: apply=false weight=2
      IKMarkerTask r_smpl_hip: apply=true weight=1
      IKMarkerTask l_smpl_hip: apply=true weight=1
      IKMarkerTask r_smpl_ankle: apply=true weight=1
      IKMarkerTask l_smpl_ankle: apply=true weight=1
      IKMarkerTask r_smpl_mtp: apply=true weight=1
      IKMarkerTask l_smpl_mtp: apply=true weight=1
      IKMarkerTask r_smpl_knee: apply=true weight=1
      IKMarkerTask l_smpl_knee: apply=true weight=1
      IKMarkerTask r_smpl_shoulder: apply=true weight=1
      IKMarkerTask l_smpl_shoulder: apply=true weight=1
      IKMarkerTask r_smpl_elbow: apply=true weight=1
      IKMarkerTask l_smpl_elbow: apply=true weight=1
      IKMarkerTask r_smpl_hand: apply=true weight=1
      IKMarkerTask l_smpl_hand: apply=true weight=1
      IKMarkerTask smpl_pelvis: apply=true weight=1
      IKMarkerTask smpl_spine: apply=true weight=1
      IKMarkerTask smpl_head: apply=true weight=1
      IKCoordinateTask knee_angle_r: apply=false weight=1 value_type=default_value value=0
      IKCoordinateTask knee_angle_l: apply=false weight=1 value_type=default_value value=0
      IKCoordinateTask lumbar_bending: apply=false weight=1 value_type=default_value value=0
      IKCoordinateTask arm_flex_r: apply=false weight=1 value_type=default_value value=0
      IKCoordinateTask arm_add_r: apply=false weight=1 value_type=manual_value value=-1.500983
      IKCoordinateTask arm_rot_r: apply=false weight=1 value_type=default_value value=0
      IKCoordinateTask elbow_flex_r: apply=false weight=1 value_type=default_value value=0
      IKCoordinateTask pro_sup_r: apply=false weight=1 value_type=manual_value value=1.570796
      IKCoordinateTask arm_flex_l: apply=false weight=1 value_type=default_value value=0
      IKCoordinateTask arm_add_l: apply=false weight=1 value_type=manual_value value=-1.500983
      IKCoordinateTask arm_rot_l: apply=false weight=1 value_type=default_value value=0
      IKCoordinateTask elbow_flex_l: apply=false weight=1 value_type=default_value value=0
      IKCoordinateTask pro_sup_l: apply=false weight=1 value_type=manual_value value=1.570796
